** This Abaqus input file, created in 2021 by Sedighe Keynia,
** University of Nebraska-Lincoln (UNL), was used to generate
** the result shown in Fig. 10A-1 of
** Yanagisawa, et al., insilicoPlants, 2022
** (https://doi.org/10.1093/insilicoplants/diac004)
** Please cite this paper if this file is helpful.
** Questions about this model should be directed to
** Professor Joseph Turner, (jaturner@unl.edu)
**
*Heading
** Job name: Job-9_CFG_80 Model name: Model-80
** Generated by: Abaqus/CAE 2019
*Preprint, echo=NO, model=NO, history=NO, contact=NO
**
** PARTS
**
*Part, name=Cotton_1
*Node
      1, 0.00725999987, 0.0562399998,           0.
      2, 0.00621047523, 0.0599999987,           0.
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*Element, type=S4R
   1,    1,  113,  499,  114
   2,  113,  112,  500,  499
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*Element, type=S3
1101, 1528, 1516, 1527
1102, 1910, 1848, 1892
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*Nset, nset=BASE_L_Edge
   1,   2,   3,   4, 114, 115
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*Elset, elset=BASE_L_Edge
     1,   110,   111,   220,   221,   330
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*Nset, nset=Base
   4, 390, 391, 392, 393, 394
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*Elset, elset=Base, generate
  2553,  17922,    141
*Nset, nset=Base_M_Edge
   1,   2,   4, 114, 115, 116
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*Elset, elset=Base_M_Edge
     1,   110,   111,   220,   221,   330
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*Nset, nset=Base_edge
   1,   4, 250, 251, 252, 253
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*Elset, elset=Base_edge
  2413,  2414,  2415,  2416,  2417,  2418
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*Nset, nset=TRC_P
   1,   5,   6,   7,   8,   9
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*Elset, elset=TRC_P
     1,     2,     3,     4,     5,     6
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*Nset, nset=TRC_edge
   1,   2, 114, 115, 116, 117, 118, 119, 120, 121, 122
*Elset, elset=TRC_edge
    1,  110,  111,  220,  221,  330
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*Elset, elset=_Outer_base_SPOS, internal, generate
  2413,  17922,      1
*Surface, type=ELEMENT, name=Outer_base
_Outer_base_SPOS, SPOS
*Elset, elset=_Inner_base_SNEG, internal, generate
  2413,  17922,      1
*Surface, type=ELEMENT, name=Inner_base
_Inner_base_SNEG, SNEG
*Elset, elset=_MDZ_Outer_SPOS, internal, generate
 1101,  2412,     1
*Surface, type=ELEMENT, name=MDZ_Outer
_MDZ_Outer_SPOS, SPOS
*Elset, elset=_MDZ_inner_SNEG, internal, generate
 1101,  2412,     1
*Surface, type=ELEMENT, name=MDZ_inner
_MDZ_inner_SNEG, SNEG
*Elset, elset=_whole_inner_SNEG, internal, generate
     1,  17922,      1
*Surface, type=ELEMENT, name=whole_inner
_whole_inner_SNEG, SNEG
*Elset, elset=_whole_outer_SPOS, internal, generate
     1,  17922,      1
*Surface, type=ELEMENT, name=whole_outer
_whole_outer_SPOS, SPOS
*Orientation, name=Ori-1, system=CYLINDRICAL
          0.,           0.,           0.,           0.,           1.,           0.
1, 0.
** Region: (Base-1: Generated From Layup)
*Elset, elset=Base-1
     1,     2,     3,     4,     5,     6
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** Section: Base-1
*Shell Section, elset=Base-1, composite, orientation=Ori-1, layup=Base
1.125e-05, 3, Cellulose, 80., Ply-1
0.0001275, 3, Pectin, 0., Ply-2
1.125e-05, 3, Cellulose, 80., Ply-3
*Orientation, name=Ori-2, system=CYLINDRICAL
          0.,           0.,           0.,           0.,           1.,           0.
1, 0.
** Region: (MDZ-1: Generated From Layup)
*Elset, elset=MDZ-1, generate
 1101,  2412,     1
** Section: MDZ-1
*Shell Section, elset=MDZ-1, composite, orientation=Ori-2, layup=MDZ
1.125e-05, 3, MDZ_Isotropic, 0., Ply-1
0.0001275, 3, Pectin, 0., Ply-2
1.125e-05, 3, MDZ_Isotropic, 0., Ply-3
*End Part
**
**
** ASSEMBLY
**
*Assembly, name=Assembly
**
*Instance, name=Cotton_1-1, part=Cotton_1
*End Instance
**
*Elset, elset=_Surf-1_SPOS, internal, instance=Cotton_1-1, generate
  2413,  17922,      1
*Surface, type=ELEMENT, name=Surf-1
_Surf-1_SPOS, SPOS
*Elset, elset=_Surf-2_SNEG, internal, instance=Cotton_1-1, generate
  2413,  17922,      1
*Surface, type=ELEMENT, name=Surf-2
_Surf-2_SNEG, SNEG
*Elset, elset=_Surf-5_SNEG, internal, instance=Cotton_1-1, generate
  2413,  17922,      1
*Surface, type=ELEMENT, name=Surf-5
_Surf-5_SNEG, SNEG
*Elset, elset=_Surf-6_SPOS, internal, instance=Cotton_1-1, generate
  2413,  17922,      1
*Surface, type=ELEMENT, name=Surf-6
_Surf-6_SPOS, SPOS
*End Assembly
*Amplitude, name=Atm, definition=SMOOTH STEP
             0.,              0.,             0.2,              1.,              1.,              1.
*Amplitude, name=Turgor, definition=SMOOTH STEP
             0.,              0.,             0.2,              1.,              1.,              1.
**
** MATERIALS
**
*Material, name=Cellulose
*Density
 1.65e-09,
*Elastic, type=LAMINA
70000., 100., 0.45,  45.,  45.,  45.
*Material, name=MDZ_Isotropic
*Density
 1.09e-09,
*Elastic
400., 0.45
*Material, name=Pectin
*Density
 1e-09,
*Elastic, moduli=INSTANTANEOUS
100., 0.45
*Viscoelastic, time=PRONY
 0.33,   0., 10.2
 0.25,   0.,  1.8
** ----------------------------------------------------------------
**
** STEP: Step-1
**
*Step, name=Step-1, nlgeom=YES
*Static
0.1, 25., 0.00025, 25.
**
*Bulk Viscosity
0.06, 1.2
** Mass Scaling: Semi-Automatic
**               Whole Model
*Variable Mass Scaling, dt=5e-06, type=below min, frequency=50
**
** BOUNDARY CONDITIONS
**
** Name: BC-1 Type: Symmetry/Antisymmetry/Encastre
*Boundary
Cotton_1-1.Base, PINNED
**
** LOADS
**
** Name: Turgor   Type: Pressure
*Dsload, amplitude=Turgor
Cotton_1-1.whole_inner, P, 0.5
** Name: atm   Type: Pressure
*Dsload, amplitude=Atm
Cotton_1-1.whole_outer, P, 0.1
**
** OUTPUT REQUESTS
**
*Restart, write, number interval=1, time marks=NO
**
** FIELD OUTPUT: F-Output-1
**
*Output, field, variable=PRESELECT
**
** HISTORY OUTPUT: H-Output-1
**
*Output, history, variable=PRESELECT
*End Step
